V := 0.126 m^3
ρ_a := 1.2 kg/m^3
c_a := 340 m/s
S := 0.0855 m^2
L := 0.18 kg
ρ_a*c_a^2 = 138720 Pa
C := V/(ρ_a*c_a^2*S^2) = 124.251 m*10^-6/N
C := 31*10^-6 m/N
f := 1/(2*π*sqrt(L*C)) = 67.3757 Hz
1/(2*π*f*C) = 76.2001 kg/s
sqrt(L/C) = 76.2001 kg/s
a := 0.2 m
K := 1/2*ρ_a*S*a^2/c_a = 6.03529e-6 kg*s
F_p := 50 Hz
L_p
R_r := 100 kg/s
L_r := sqrt(K*R_r) = 24.5668 kg*10^-3
