# Если:
#
# f - средняя частота окна
# wh- половина ширины окна в октавах
#
# то:
#
# Верхняя частота окна будет равна:
# f_1 := f*2^wh → f*2^wh
#
# Нижняя частота окна:
# f_0 := f/2^wh → f/2^wh
#
# Тогда отношение ширины окна вверх и вниз будет равно:
# r := (f_1 - f)/(f - f_0) simplify → 2^wh
#
# Для rFFT с количеством бинов =n и частотой дискретизации сигнала f_s, шаг дискретизации частотного спектра будет равен:
# df := f_s/(2*n) → f_s/(2*n)
# Тогда ширина окна составит:
# w_d := (f_1 - f_0)/df simplify → 2*f*n*2^(-wh)*(4^wh - 1)/f_s
#
# Причем вниз эта ширина составит:
# w_0 := (f - f_0)/df simplify → f*n*2^(-wh)*(2^(wh + 1) - 2)/f_s
#
# А верх:
# w_1 := (f_1 - f)/df simplify → f*n*(2^(wh + 1) - 2)/f_s
#
# Проверим:
# w_1/w_0 simplify → 2^wh
#
# номер центрального бина будет равен:
# k_1 := f/df → 2*f*n/f_s
#
# Номер крайнего нижнего бина:
# k_0 := k_1 - w_0 simplify → 2*f*n*2^(-wh)/f_s
# Если переписать по-человечески, то получим:
# k'_0 := 2*f*n/(f_s*2^wh) → 2*f*n/(f_s*2^wh)
#
# Проверим себя:
# k'_0 == k_0 → 1
#
# А номер крайнего верхнего бина:
# k_2 := k_1 + w_1 simplify → f*n*2^(wh + 1)/f_s
# Если переписать по-человечески, то получим:
# k'_2 := 2*f*n*2^wh/f_s → 2*f*n*2^wh/f_s
# Проверим себя:
# k'_2 == k_2 → 1
